<?xml version="1.0"?>
<Node name="Root" gravity="0.0 -0.0 0.0" >
    <VisualStyle displayFlags="showBehaviorModels showVisual showForceFields" />
	<Node name="web"  >
		<EulerImplicit name="cg_odesolver" printLog="false"  rayleighStiffness="0.1" rayleighMass="0.1" />
		<CGLinearSolver name="cGLinearSolver1"  iterations="20"  tolerance="1e-05"  threshold="1e-08" />
		<EdgeSetTopologyContainer name="Container_points" points="0.207816 100.108772 0.000000 11.791595 100.196247 0.000000 12.459312 100.140234 0.000000 17.853052 100.154085 0.000000 40.224232 100.211536 0.000000 44.230971 100.192962 0.000000 61.002816 100.149442 0.000000 88.074492 100.392145 0.000000 100.017576 100.278498 0.000000 99.910841 78.630535 0.000000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" />
		<EdgeSetTopologyContainer name="Container_Frame" points="@Container_points.points" edges="0 0 0 1 1 2 2 3 3 4 4 5 5 6 6 7 7 8 8 9 9 10 10 11 11 12 12 13 13 14 14 15 15 16 16 17 17 18 18 19 19 0" />
		<EdgeSetTopologyContainer name="Container_Mooring" points="@Container_points.points" edges="0 20 20 21 21 0 0 21 21 19 19 20 20 21 21 22 22 23 23 3 3 23 23 2 2 1 1 22 22 21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" />
		<EdgeSetTopologyContainer name="Container_Radii" points="@Container_points.points" edges="76 77 77 78 78 79 79 80 80 80 80 81 81 82 82 82 82 83 83 84 84 85 85 86 86 87 87 88 88 89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" />
		<EdgeSetTopologyContainer name="Container_CapSpiral" points="@Container_points.points" edges="713 764 764 772 772 83 83 126 126 137 137 181 181 193 193 238 238 246 246 293 293 302 302 349 349 355 355 402 402 410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" />
		<EdgeSetTopologyContainer name="Container_Hub" points="@Container_points.points" edges="191 239 239 245 245 294 294 301 301 354 354 403 403 409 409 452 452 804 804 805 805 505 505 553 553 599 599 602 602 651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" />
		<PointSetGeometryAlgorithms name="pointAlgorithms" template="Vec3d" />
		<EdgeSetGeometryAlgorithms name="edgeAlgorithms" template="Vec3d" />
		<MechanicalObject name="dofs" template="Vec3d" restScale="1" />
		<UniformMass name="umass" totalMass="0.01" showGravityCenter = true />
		<FixedConstraint name="FixedConstraint" indices="0   1   2   3   4   5   6   7   8   9  10  11  12  13  14  15  16  17  18  19" />
		<MeshSpringForceField name="Springs_Frame" topology="@Container_Frame" template="Vec3d" noCompression=true stiffness="12000000000000"  damping="2.4e-07" drawSpringSize="3.6" drawMinElongationRange="-1e-20" drawMaxElongationRange="1e-20" />
		<MeshSpringForceField name="Springs_Mooring" topology="@Container_Mooring" template="Vec3d" noCompression=true stiffness="12000000000000"  damping="2.4e-07" drawSpringSize="3.6" drawMinElongationRange="-1e-20" drawMaxElongationRange="1e-20" />
		<MeshSpringForceField name="Springs_Radii" topology="@Container_Radii" template="Vec3d" noCompression=true stiffness="12000000000000"  damping="2.4e-07" drawSpringSize="3.6" drawMinElongationRange="-1e-20" drawMaxElongationRange="1e-20" />
		<MeshSpringForceField name="Springs_CapSpiral" topology="@Container_CapSpiral" template="Vec3d" noCompression=true stiffness="12000000000000"  damping="2.4e-07" drawSpringSize="3.6" drawMinElongationRange="-1e-20" drawMaxElongationRange="1e-20" />
		<MeshSpringForceField name="Springs_Hub" topology="@Container_Hub" template="Vec3d" noCompression=true stiffness="12000000000000"  damping="2.4e-07" drawSpringSize="3.6" drawMinElongationRange="-1e-20" drawMaxElongationRange="1e-20" />
		<RestShapeSpringsForceField name="Springs_lateral" points="@Container_points.points" template="Vec3d" stiffness="0" drawSpring="0" springColor="255 255 0 255" />
		<OglModel name="renderer" color="red" />
		<OscillatorConstraint name="excitation" template="Vec3d" oscillators="743  3.0060e+01   4.3062e+01            0  0  0  1  100 0" />
		<Monitor template="Vec3d" name="export" indices="76   21   29   36   42   49   52   57   68   72  160" ExportPositions=true fileName="C:\Users\hadis\OneDrive - Queen Mary, University of London\Hadi\Postdoc\1_Bristol\2. Research\12. Model\1. main_CAD_MatlabGCode_SOFA_Opt\Matlab GCode\export" />
	</Node>
</Node>
