<?xml version="1.0"?>
<Node name="Root" gravity="0.0 -0.0 0.0" >
    <VisualStyle displayFlags="showBehaviorModels showVisual showForceFields" />
	<Node name="web"  >
		<EulerImplicit name="cg_odesolver" printLog="false"  rayleighStiffness="0.1" rayleighMass="0.1" />
		<CGLinearSolver name="cGLinearSolver1"  iterations="20"  tolerance="1e-05"  threshold="1e-08" />
		<EdgeSetTopologyContainer name="Container_points" points="0.051427 100.154846 0.000000 9.455184 100.243397 0.000000 30.449556 100.210932 0.000000 61.393434 100.163080 0.000000 64.040551 100.158987 0.000000 101.417732 99.998094 0.000000 101.227714 89.843749 0.000000 100.215708 6.494799 0.000000 100.037312 4.278580 0.000000 99.861151 -0.257230 0.000000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" />
		<EdgeSetTopologyContainer name="Container_Frame" points="@Container_points.points" edges="0 1 1 2 2 3 3 4 4 5 5 6 6 7 7 8 8 9 9 10 10 11 11 12 12 13 13 13 13 14 14 15 15 16 16 17 17 18 18 19 19 20 20 21 21 22 22 0" />
		<EdgeSetTopologyContainer name="Container_Mooring" points="@Container_points.points" edges="0 23 23 24 24 23 23 25 25 26 26 23 23 26 26 22 22 26 26 25 25 21 21 25 25 27 27 28 28 29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" />
		<EdgeSetTopologyContainer name="Container_Radii" points="@Container_points.points" edges="87 88 88 89 89 90 90 90 90 91 91 92 92 93 93 94 94 95 95 96 96 96 96 97 97 98 98 99 99 100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" />
		<EdgeSetTopologyContainer name="Container_CapSpiral" points="@Container_points.points" edges="413 461 461 515 515 468 468 520 520 565 565 573 573 623 623 634 634 680 680 688 688 733 733 733 733 780 780 785 785 824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" />
		<EdgeSetTopologyContainer name="Container_Hub" points="@Container_points.points" edges="869 870 870 871 871 872 872 734 734 687 687 681 681 633 633 624 624 572 572 566 566 519 519 467 467 462 462 412 412 362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" />
		<PointSetGeometryAlgorithms name="pointAlgorithms" template="Vec3d" />
		<EdgeSetGeometryAlgorithms name="edgeAlgorithms" template="Vec3d" />
		<MechanicalObject name="dofs" template="Vec3d" restScale="1" />
		<UniformMass name="umass" totalMass="0.01" showGravityCenter = true />
		<FixedConstraint name="FixedConstraint" indices="0   1   2   3   4   5   6   7   8   9  10  11  12  13  14  15  16  17  18  19  20  21  22" />
		<MeshSpringForceField name="Springs_Frame" topology="@Container_Frame" template="Vec3d" noCompression=true stiffness="12000000000000"  damping="2.4e-07" drawSpringSize="3.6" drawMinElongationRange="-1e-20" drawMaxElongationRange="1e-20" />
		<MeshSpringForceField name="Springs_Mooring" topology="@Container_Mooring" template="Vec3d" noCompression=true stiffness="12000000000000"  damping="2.4e-07" drawSpringSize="3.6" drawMinElongationRange="-1e-20" drawMaxElongationRange="1e-20" />
		<MeshSpringForceField name="Springs_Radii" topology="@Container_Radii" template="Vec3d" noCompression=true stiffness="12000000000000"  damping="2.4e-07" drawSpringSize="3.6" drawMinElongationRange="-1e-20" drawMaxElongationRange="1e-20" />
		<MeshSpringForceField name="Springs_CapSpiral" topology="@Container_CapSpiral" template="Vec3d" noCompression=true stiffness="12000000000000"  damping="2.4e-07" drawSpringSize="3.6" drawMinElongationRange="-1e-20" drawMaxElongationRange="1e-20" />
		<MeshSpringForceField name="Springs_Hub" topology="@Container_Hub" template="Vec3d" noCompression=true stiffness="12000000000000"  damping="2.4e-07" drawSpringSize="3.6" drawMinElongationRange="-1e-20" drawMaxElongationRange="1e-20" />
		<RestShapeSpringsForceField name="Springs_lateral" points="@Container_points.points" template="Vec3d" stiffness="0" drawSpring="0" springColor="255 255 0 255" />
		<OglModel name="renderer" color="red" />
		<OscillatorConstraint name="excitation" template="Vec3d" oscillators="199  21.4167      85.6976            0  0  0  1  100 0" />
		<Monitor template="Vec3d" name="export" indices="88   83   80   76   71   62   55   42   38   31  199" ExportPositions=true fileName="C:\Users\hadis\OneDrive - Queen Mary, University of London\Hadi\Postdoc\1_Bristol\2. Research\12. Model\1. main_CAD_MatlabGCode_SOFA_Opt\Matlab GCode\export" />
	</Node>
</Node>
