<?xml version="1.0"?>
<Node name="Root" gravity="0.0 -0.0 0.0" >
    <VisualStyle displayFlags="showBehaviorModels showVisual showForceFields" />
	<Node name="web"  >
		<EulerImplicit name="cg_odesolver" printLog="false"  rayleighStiffness="0.1" rayleighMass="0.1" />
		<CGLinearSolver name="cGLinearSolver1"  iterations="20"  tolerance="1e-05"  threshold="1e-08" />
		<EdgeSetTopologyContainer name="Container_points" points="0.000000 3.571429 0.000000 0.000000 7.142857 0.000000 0.000000 10.714286 0.000000 0.000000 14.285714 0.000000 0.000000 17.857143 0.000000 0.000000 21.428571 0.000000 0.000000 25.000000 0.000000 0.000000 28.571429 0.000000 0.000000 32.142857 0.000000 0.000000 35.714286 0.000000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" />
		<EdgeSetTopologyContainer name="Container_full_web" points="@Container_points.points" edges="0 0 0 1 1 2 2 3 3 4 4 5 5 6 7 7 7 8 8 9 9 10 10 11 11 12 12 13 13 14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" />
		<PointSetGeometryAlgorithms name="pointAlgorithms" template="Vec3d" />
		<EdgeSetGeometryAlgorithms name="edgeAlgorithms" template="Vec3d" />
		<MechanicalObject name="dofs" template="Vec3d" restScale="1" />
		<UniformMass name="umass" totalMass="0.01" showGravityCenter = true />
		<FixedConstraint name="FixedConstraint" indices="0    1    2    3    4    5    6    7    8    9   10   11   12   13   14   15   16   17   18   19   20   21   22   23   24   25   26   27  840  811  812  813  814  815  816  817  818  819  820  821  822  823  824  825  826  827  828  829  830  831  832  833  834  835  836  837  838  839   28   57   86  115  144  173  202  231  260  289  318  347  376  405  434  463  492  521  550  579  608  637  666  695  724  753  782  811  840   27   56   85  114  143  172  201  230  259  288  317  346  375  404  433  462  491  520  549  578  607  636  665  694  723  752  781  810  839" />
		<MeshSpringForceField name="Springs_full_web" topology="@Container_full_web" template="Vec3d" noCompression=true stiffness="12000000000000"  damping="2.4e-07" drawSpringSize="3.6" drawMinElongationRange="-1e-20" drawMaxElongationRange="1e-20" />
		<RestShapeSpringsForceField name="Springs_lateral" points="@Container_points.points" template="Vec3d" stiffness="0" drawSpring="1" springColor="255 255 0 255" />
		<OglModel name="renderer" color="red" />
		<OscillatorConstraint name="excitation" template="Vec3d" oscillators="350  42.8571      10.7143            0  0  0  1  100 0" />
		<Monitor template="Vec3d" name="export" indices="344  604  770  494  234  234   68  167  350" ExportPositions=true fileName="C:\Users\hadis\OneDrive - Queen Mary, University of London\Hadi\Postdoc\1_Bristol\2. Research\12. Model\1. main_CAD_MatlabGCode_SOFA_Opt\Matlab GCode\export" />
	</Node>
</Node>
