<?xml version="1.0"?>
<Node name="Root" gravity="0.0 -0.0 0.0" >
    <VisualStyle displayFlags="showBehaviorModels showVisual showForceFields" />
	<Node name="web"  >
		<EulerImplicit name="cg_odesolver" printLog="false"  rayleighStiffness="0.1" rayleighMass="0.1" />
		<CGLinearSolver name="cGLinearSolver1"  iterations="20"  tolerance="1e-05"  threshold="1e-08" />
		<EdgeSetTopologyContainer name="Container_points" points="52.000000 50.000000 0.000000 51.931852 50.517638 0.000000 51.732051 51.000000 0.000000 51.414214 51.414214 0.000000 51.000000 51.732051 0.000000 50.517638 51.931852 0.000000 50.000000 52.000000 0.000000 49.482362 51.931852 0.000000 49.000000 51.732051 0.000000 48.585786 51.414214 0.000000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" />
		<EdgeSetTopologyContainer name="Container_full_web" points="@Container_points.points" edges="0 1 1 2 2 3 3 4 4 5 5 6 6 7 7 8 8 9 9 10 10 11 11 12 12 13 13 14 14 15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" />
		<PointSetGeometryAlgorithms name="pointAlgorithms" template="Vec3d" />
		<EdgeSetGeometryAlgorithms name="edgeAlgorithms" template="Vec3d" />
		<MechanicalObject name="dofs" template="Vec3d" restScale="1" />
		<UniformMass name="umass" totalMass="0.01" showGravityCenter = true />
		<FixedConstraint name="FixedConstraint" indices="730  731  732  733  734  735  736  721  722  723  724  742  743  744  736  737  738  739  740  741  742  724  725  726  727  728  729  730" />
		<MeshSpringForceField name="Springs_full_web" topology="@Container_full_web" template="Vec3d" noCompression=true stiffness="12000000000000"  damping="2.4e-07" drawSpringSize="3.6" drawMinElongationRange="-1e-20" drawMaxElongationRange="1e-20" />
		<RestShapeSpringsForceField name="Springs_lateral" points="@Container_points.points" template="Vec3d" stiffness="0" drawSpring="1" springColor="255 255 0 255" />
		<OglModel name="renderer" color="red" />
		<OscillatorConstraint name="excitation" template="Vec3d" oscillators="103  47.9294      57.7274            0  0  0  1  100 0" />
		<Monitor template="Vec3d" name="export" indices="703  700  697  715  712  712  709  705  103" ExportPositions=true fileName="C:\Users\hadis\OneDrive - Queen Mary, University of London\Hadi\Postdoc\1_Bristol\2. Research\12. Model\1. main_CAD_MatlabGCode_SOFA_Opt\Matlab GCode\export" />
	</Node>
</Node>
