<?xml version="1.0"?>
<Node name="Root" gravity="0.0 -0.0 0.0" >
    <VisualStyle displayFlags="showBehaviorModels showVisual showForceFields" />
	<Node name="web"  >
		<EulerImplicit name="cg_odesolver" printLog="false"  rayleighStiffness="0.1" rayleighMass="0.1" />
		<CGLinearSolver name="cGLinearSolver1"  iterations="20"  tolerance="1e-05"  threshold="1e-08" />
		<EdgeSetTopologyContainer name="Container_points" points="-3.400491 -0.617084 0.000000 -3.371625 -0.616648 0.000000 -2.592238 -0.604891 0.000000 -2.635893 -0.773877 0.000000 -1.812822 -0.593155 0.000000 -1.871696 -0.930398 0.000000 -1.033376 -0.581438 0.000000 -1.107899 -1.086646 0.000000 -0.253902 -0.569741 0.000000 -0.344502 -1.242621 0.000000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" />
		<EdgeSetTopologyContainer name="Container_full_web" points="@Container_points.points" edges="0 1 1 2 2 3 2 4 4 5 4 6 6 7 6 8 8 9 8 10 10 11 10 12 12 13 12 14 14 15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" />
		<PointSetGeometryAlgorithms name="pointAlgorithms" template="Vec3d" />
		<EdgeSetGeometryAlgorithms name="edgeAlgorithms" template="Vec3d" />
		<MechanicalObject name="dofs" template="Vec3d" restScale="1" />
		<UniformMass name="umass" totalMass="0.01" showGravityCenter = true />
		<FixedConstraint name="FixedConstraint" indices="88  148  208  268  328  388  448  508  568  628  688  748  808  812" />
		<MeshSpringForceField name="Springs_full_web" topology="@Container_full_web" template="Vec3d" noCompression=true stiffness="12000000000000"  damping="2.4e-07" drawSpringSize="3.6" drawMinElongationRange="-1e-20" drawMaxElongationRange="1e-20" />
		<RestShapeSpringsForceField name="Springs_lateral" points="@Container_points.points" template="Vec3d" stiffness="0" drawSpring="1" springColor="255 255 0 255" />
		<OglModel name="renderer" color="red" />
		<OscillatorConstraint name="excitation" template="Vec3d" oscillators="440  -30.7666       3.4824            0  0  0  1  100 0" />
		<Monitor template="Vec3d" name="export" indices="422  446  566  657  746   55  146  266  357  440" ExportPositions=true fileName="C:\Users\hadis\OneDrive - Queen Mary, University of London\Hadi\Postdoc\1_Bristol\2. Research\12. Model\1. main_CAD_MatlabGCode_SOFA_Opt\Matlab GCode\export" />
	</Node>
</Node>
